// SBML level 3 version 1

model __main()

  // Compartments:
  compartment default_compartment = 1;

  // Species:
  species SERINE in default_compartment = 4.93095;
  species HCO3 in default_compartment = 73.5294;
  species PYRUVICACID in default_compartment = 0;
  species MALICACID in default_compartment = 0;
  species OXALOACETICACID in default_compartment = 0;
  species NH3 in default_compartment = 0;
  species ATP in default_compartment = 4.93095;
  species ADP in default_compartment = 0;
  species NADH in default_compartment = 7.53695;
  species NAD_plus in default_compartment = 0;
  species SDA_MSMEG in default_compartment = 0;
  species SDA_BSUB in default_compartment = 0;
  species SDA_ECOLI in default_compartment = 0;
  species SDA_LPNEU in default_compartment = 0;
  species PCX_RETLI in default_compartment = 0;
  species PCX_SCER in default_compartment = 0;
  species PCX_MSMEG in default_compartment = 0;
  species PCX_GTHERM in default_compartment = 0;
  species MDH_ECOLI in default_compartment = 0;
  species MDH_MDOM in default_compartment = 0;
  species MDH_REMER in default_compartment = 0;
  species MDH_TAES in default_compartment = 0;
  species DNA_SDA_MSMEG in default_compartment = 0;
  species DNA_SDA_BSUB in default_compartment = 0;
  species DNA_SDA_ECOLI in default_compartment = 0;
  species DNA_SDA_LPNEU in default_compartment = 0;
  species DNA_PCX_RETLI in default_compartment = 0;
  species DNA_PCX_SCER in default_compartment = 0;
  species DNA_PCX_MSMEG in default_compartment = 0;
  species DNA_PCX_GTHERM in default_compartment = 0;
  species DNA_MDH_ECOLI in default_compartment = 0;
  species DNA_MDH_MDOM in default_compartment = 0;
  species DNA_MDH_REMER in default_compartment = 0;
  species DNA_MDH_TAES in default_compartment = 0;

  // Parameters:
  AMP = 0;
  NADPH = 0;
  NADP_plus = 0;
  kcat_R1 = 500;
  Km_R1 = 0.00258;
  kcat_R2 = 585;
  Km_R2 = 29.2;
  kcat_R3 = 436;
  Km_R3 = 2.67;
  kcat_R4 = 506;
  Km_R4 = 2.2;
  kcat_R5 = 7.33;
  Km1_R5 = 1.65;
  Km2_R5 = 10.8;
  maxC_ATP_C0 = 4;
  kcat_R6 = 60;
  Km1_R6 = 0.5;
  Km2_R6 = 1.36;
  kcat_R7 = 33.5;
  Km1_R7 = 0.375;
  Km2_R7 = 3.8;
  kcat_R8 = 33.5;
  Km1_R8 = 0.31;
  Km2_R8 = 45;
  kcat_R9 = 931;
  Km1_R9 = 4;
  maxC_NADH_C0 = 10;
  kcat_R10 = 4553;
  Km1_R10 = 0.405;
  Km2_R10 = 1.4;
  kcat_R11 = 81000;
  Km1_R11 = 0.02;
  Km2_R11 = 0.025;
  kcat_R12 = 121600;
  Km1_R12 = 3.23;
  Km2_R12 = 0.39;
  k_R13 = 0.082;
  k_R14 = 0.106;
  k_R15 = 0.012;
  k_TXTL = 0.86;

  // Reactions:
  R1: SERINE + SDA_MSMEG -> SDA_MSMEG + PYRUVICACID + NH3; kcat_R1*SDA_MSMEG*SERINE/(Km_R1 + SERINE);
  R2: SERINE + SDA_BSUB -> SDA_BSUB + PYRUVICACID + NH3; kcat_R2*SDA_BSUB*SERINE/(Km_R2 + SERINE);
  R3: SERINE + SDA_ECOLI -> SDA_ECOLI + PYRUVICACID + NH3; kcat_R3*SDA_ECOLI*SERINE/(Km_R3 + SERINE);
  R4: SERINE + SDA_LPNEU -> SDA_LPNEU + PYRUVICACID + NH3; kcat_R4*SDA_LPNEU*SERINE/(Km_R4 + SERINE);
  R5: PYRUVICACID + HCO3 + ATP + PCX_RETLI -> PCX_RETLI + OXALOACETICACID + ADP; kcat_R5*PCX_RETLI*PYRUVICACID*HCO3/(PYRUVICACID*HCO3 + Km1_R5*HCO3 + Km2_R5*PYRUVICACID + Km1_R5*Km2_R5)*(ATP/maxC_ATP_C0);
  R6: PYRUVICACID + HCO3 + ATP + PCX_SCER -> PCX_SCER + OXALOACETICACID + ADP; kcat_R6*PCX_SCER*PYRUVICACID*HCO3/(PYRUVICACID*HCO3 + Km1_R6*HCO3 + Km2_R6*PYRUVICACID + Km1_R6*Km2_R6)*(ATP/maxC_ATP_C0);
  R7: PYRUVICACID + HCO3 + ATP + PCX_MSMEG -> PCX_MSMEG + OXALOACETICACID + ADP; kcat_R7*PCX_MSMEG*PYRUVICACID*HCO3/(PYRUVICACID*HCO3 + Km1_R7*HCO3 + Km2_R7*PYRUVICACID + Km1_R7*Km2_R7)*(ATP/maxC_ATP_C0);
  R8: PYRUVICACID + HCO3 + ATP + PCX_GTHERM -> PCX_GTHERM + OXALOACETICACID + ADP; kcat_R8*PCX_GTHERM*PYRUVICACID*HCO3/(PYRUVICACID*HCO3 + Km1_R8*HCO3 + Km2_R8*PYRUVICACID + Km1_R8*Km2_R8)*(ATP/maxC_ATP_C0);
  R9: OXALOACETICACID + NADH + MDH_ECOLI -> MDH_ECOLI + MALICACID + NAD_plus; kcat_R9*MDH_ECOLI*OXALOACETICACID/(Km1_R9 + OXALOACETICACID)*(NADH/maxC_NADH_C0);
  R10: OXALOACETICACID + NADH + MDH_MDOM -> MDH_MDOM + MALICACID + NAD_plus; kcat_R10*MDH_MDOM*OXALOACETICACID*NADH/(OXALOACETICACID*NADH + Km1_R10*NADH + Km2_R10*OXALOACETICACID + Km1_R10*Km2_R10);
  R11: OXALOACETICACID + NADH + MDH_REMER -> MDH_REMER + MALICACID + NAD_plus; kcat_R11*MDH_REMER*OXALOACETICACID*NADH/(OXALOACETICACID*NADH + Km1_R11*NADH + Km2_R11*OXALOACETICACID + Km1_R11*Km2_R11);
  R12: OXALOACETICACID + NADH + MDH_TAES -> MDH_TAES + MALICACID + NAD_plus; kcat_R12*MDH_TAES*OXALOACETICACID*NADH/(OXALOACETICACID*NADH + Km1_R12*NADH + Km2_R12*OXALOACETICACID + Km1_R12*Km2_R12);
  R13: SERINE -> ; k_R13*SERINE;
  R14: PYRUVICACID -> ; k_R14*PYRUVICACID;
  R15: MALICACID -> ; k_R15*MALICACID;
  R16: DNA_SDA_MSMEG + 15 SERINE -> DNA_SDA_MSMEG + SDA_MSMEG; k_TXTL*DNA_SDA_MSMEG*SERINE;
  R17: DNA_SDA_BSUB + 15 SERINE -> DNA_SDA_BSUB + SDA_BSUB; k_TXTL*DNA_SDA_BSUB*SERINE;
  R18: DNA_SDA_ECOLI + 15 SERINE -> DNA_SDA_ECOLI + SDA_ECOLI; k_TXTL*DNA_SDA_ECOLI*SERINE;
  R19: DNA_SDA_LPNEU + 15 SERINE -> DNA_SDA_LPNEU + SDA_LPNEU; k_TXTL*DNA_SDA_LPNEU*SERINE;
  R20: DNA_PCX_RETLI + 22 SERINE -> DNA_PCX_RETLI + PCX_RETLI; k_TXTL*DNA_PCX_RETLI*SERINE;
  R21: DNA_PCX_SCER + 22 SERINE -> DNA_PCX_SCER + PCX_SCER; k_TXTL*DNA_PCX_SCER*SERINE;
  R22: DNA_PCX_MSMEG + 22 SERINE -> DNA_PCX_MSMEG + PCX_MSMEG; k_TXTL*DNA_PCX_MSMEG*SERINE;
  R23: DNA_PCX_GTHERM + 22 SERINE -> DNA_PCX_GTHERM + PCX_GTHERM; k_TXTL*DNA_PCX_GTHERM*SERINE;
  R24: DNA_MDH_ECOLI + 15 SERINE -> DNA_MDH_ECOLI + MDH_ECOLI; k_TXTL*DNA_MDH_ECOLI*SERINE;
  R25: DNA_MDH_MDOM + 15 SERINE -> DNA_MDH_MDOM + MDH_MDOM; k_TXTL*DNA_MDH_MDOM*SERINE;
  R26: DNA_MDH_REMER + 15 SERINE -> DNA_MDH_REMER + MDH_REMER; k_TXTL*DNA_MDH_REMER*SERINE;
  R27: DNA_MDH_TAES + 15 SERINE -> DNA_MDH_TAES + MDH_TAES; k_TXTL*DNA_MDH_TAES*SERINE;
end
